// SBML level 3 version 1
// Created with https://github.com/matthiaskoenig/sbmlutils.

model model1()
  // Example model from COMBINE2021
  // COMBINE2021 model
  // This model was built within the tutorial session.
  // model units - substance: mmole, time: min, volume: litre, length: metre, extent: mmole

  // Compartments:
  compartment c = 1 litre; c is "cytosol";  // SBO:0000290 ncit:C61554 GO:0005829 FMA:66836

  // Species:
  species glc in c = 10; glc is "glucose";  // SBO:0000247 ncit:C2831 CHEBI:17234
  species glc6p in c = 0; glc6p is "glucose 6-phosphate";  // SBO:0000247

  // Parameters:
  HK_Vmax = 10 mmole_per_min;  // SBO:0000186
  // From ABC1987: Km = 0.1 +- 0.02 mM
  HK_Km_glc = 0.1 mM;  // SBO:0000027

  // Reactions:
  HK: glc => glc6p; HK_Vmax*glc/(glc + HK_Km_glc); HK is "hexokinase";  // SBO:0000176

  // Unit definitions:
  unit mM = 1e-3 mole / litre; mM is "mmole/liter";
  unit min = 60 second;
  unit mmole = 1e-3 mole;
  unit mmole_per_min = 1e-3 mole / (60 second); mmole_per_min is "mmole/min";
end
