// SBML level 3 version 1
// Created with https://github.com/matthiaskoenig/sbmlutils.

model model2()
  // Example model from COMBINE2021 linear chain
  // COMBINE2021 model
  // This model was built within the tutorial session.
  // model units - substance: mmole, time: min, volume: litre, length: metre, extent: mmole

  // Compartments:
  compartment c = 1 litre; c is "cytosol";  // SBO:0000290 ncit:C61554 GO:0005829 FMA:66836

  // Species:
  species S0 in c = 10;  // SBO:0000247
  species S1 in c = 0;  // SBO:0000247
  species S2 in c = 0;  // SBO:0000247
  species S3 in c = 0;  // SBO:0000247
  species S4 in c = 0;  // SBO:0000247
  species S5 in c = 0;  // SBO:0000247
  species S6 in c = 0;  // SBO:0000247
  species S7 in c = 0;  // SBO:0000247
  species S8 in c = 0;  // SBO:0000247
  species S9 in c = 0;  // SBO:0000247
  species S10 in c = 0;  // SBO:0000247

  // Parameters:
  R_Vmax = 10 mmole_per_min;  // SBO:0000186
  R_Km = 0.1 mM;  // SBO:0000027

  // Reactions:
  R0: S0 => S1; R_Vmax*S0/(S0 + R_Km);  // SBO:0000176
  R1: S1 => S2; R_Vmax*S1/(S1 + R_Km);  // SBO:0000176
  R2: S2 => S3; R_Vmax*S2/(S2 + R_Km);  // SBO:0000176
  R3: S3 => S4; R_Vmax*S3/(S3 + R_Km);  // SBO:0000176
  R4: S4 => S5; R_Vmax*S4/(S4 + R_Km);  // SBO:0000176
  R5: S5 => S6; R_Vmax*S5/(S5 + R_Km);  // SBO:0000176
  R6: S6 => S7; R_Vmax*S6/(S6 + R_Km);  // SBO:0000176
  R7: S7 => S8; R_Vmax*S7/(S7 + R_Km);  // SBO:0000176
  R8: S8 => S9; R_Vmax*S8/(S8 + R_Km);  // SBO:0000176
  R9: S9 => S10; R_Vmax*S9/(S9 + R_Km);  // SBO:0000176

  // Unit definitions:
  unit mM = 1e-3 mole / litre; mM is "mmole/liter";
  unit min = 60 second;
  unit mmole = 1e-3 mole;
  unit mmole_per_min = 1e-3 mole / (60 second); mmole_per_min is "mmole/min";
end
